*Heading
** Job name: test_CSBI Model name: Model-1
** Generated by: Abaqus/CAE 6.14-2
*Preprint, echo=NO, model=NO, history=NO, contact=NO
**
** PARTS
**
*Part, name=Part-1
*Node
      1,           0.,          20.,          20.
      2,           0.,          20.,          10.
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*Element, type=S4R
   1,    1,   10,  925,  329
   2,   10,   11,  926,  925
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*Nset, nset=Set-1, generate
     1,  12600,      1
*Elset, elset=Set-1, generate
     1,  12320,      1
** Section: Section-1
*Shell Section, elset=Set-1, material=Material-1
0.005, 5
*End Part
**
**
** ASSEMBLY
**
*Assembly, name=Assembly
**
*Instance, name=Part-1-1, part=Part-1
*End Instance
**
*Node
      1,           0.,  -1.2246468e-15,          20.
*Nset, nset=Set-1, instance=Part-1-1
   5,   6,   8, 351, 352, 353
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*Nset, nset=Set-2, instance=Part-1-1
   1,   4,   9, 191, 192, 193
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*Nset, nset=Set-4, instance=Part-1-1
 3,
*Nset, nset=Set-5
 1,
*Nset, nset=m_Set-3
 1,
*Surface, type=NODE, name=Set-2_CNS_, internal
Set-2, 1.
*Nset, nset=_T-cyl, internal
Set-1,
Set-2,
Set-5,
Set-4,
m_Set-3,
*Transform, nset=_T-cyl, type=C
          0.,           0.,           0.,           0.,           0.,           1.
** Constraint: Constraint-1
*MPC
PIN, Set-2, m_Set-3
*End Assembly
**
** MATERIALS
**
*Material, name=Material-1
*Elastic
 7e+10, 0.33
** ----------------------------------------------------------------
**
** STEP: Step-1
**
*Step, name=Step-1, nlgeom=YES, inc=1000
*Static, stabilize, factor=1e-07, allsdtol=0, continue=NO
0.01, 1., 1e-06, 1.
**
** BOUNDARY CONDITIONS
**
** Name: BC-1 Type: Displacement/Rotation
*Boundary
Set-1, 1, 1
Set-1, 2, 2
Set-1, 3, 3
Set-1, 4, 4
Set-1, 5, 5
Set-1, 6, 6
** Name: BC-2 Type: Displacement/Rotation
*Boundary
Set-2, 1, 1
Set-2, 2, 2
Set-2, 4, 4
Set-2, 5, 5
Set-2, 6, 6
** Name: BC-3 Type: Displacement/Rotation
*Boundary
Set-5, 1, 1
Set-5, 2, 2
Set-5, 4, 4
Set-5, 5, 5
Set-5, 6, 6
** Name: BC-4 Type: Displacement/Rotation
*Boundary
Set-4, 1, 1, -0.1
**
** OUTPUT REQUESTS
**
*Restart, write, frequency=0
**
** FIELD OUTPUT: F-Output-1
**
*Output, field, variable=PRESELECT
**
** HISTORY OUTPUT: H-Output-1
**
*Output, history, variable=PRESELECT
*End Step
** ----------------------------------------------------------------
**
** STEP: Step-2
**
*Step, name=Step-2, nlgeom=YES, inc=1000
*Static, stabilize, factor=1e-07, allsdtol=0, continue=NO
0.01, 1., 1e-07, 1.
**
** BOUNDARY CONDITIONS
**
** Name: BC-5 Type: Displacement/Rotation
*Boundary
Set-5, 3, 3, -0.05
**
** OUTPUT REQUESTS
**
*Restart, write, frequency=0
**
** FIELD OUTPUT: F-Output-1
**
*Output, field, variable=PRESELECT
**
** HISTORY OUTPUT: H-Output-1
**
*Output, history, variable=PRESELECT
*End Step
